*INCLUDE, INPUT=Solid/all.msh
*INCLUDE, INPUT=Solid/fix1_beam.nam
*INCLUDE, INPUT=Solid/interface_beam.nam

*MATERIAL, Name=EL
*ELASTIC
12000000, 0.3
*density
1000
*SOLID SECTION, Elset=Eall, Material=EL

*AMPLITUDE,NAME=AMP1
0,0
1,1

**INCLUDE,INPUT=Solid/boundary.inp

*INITIAL CONTIONS, TYPE=STRESS
795, 1, 7177.842, 19388.41, 7969.876, 5946.661, 6.12E-13, 9.27E-13
795, 2, 3510.388, 18043.95, 6466.301, 1001.068, -1.56E-13, 2.51E-12
795, 3, 7177.842, 19388.41, 7969.876, 5946.661, 6.14E-13, 9.27E-13
795, 4, 3510.388, 18043.95, 6466.301, 1001.068, -1.56E-13, 2.50E-12
795, 5, -8142.212, -16258.17, -7320.116, 3658.806, 5.00E-13, -1.95E-13
795, 6, -11948.87, -17653.67, -8880.76, -1474.499, 1.56E-12, -1.88E-13
795, 7, -8142.212, -16258.17, -7320.116, 3658.806, 5.08E-13, -1.88E-13
795, 8, -11948.87, -17653.67, -8880.76, -1474.499, 1.56E-12, -1.88E-13
796, 1, 1582.306, 14949.47, 4959.533, 4620.092, 6.18E-12, 4.30E-12
796, 2, 1520.964, 15474.86, 5098.747, 612.5334, 8.39E-12, 4.69E-12
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

*STEP,NLGEOM,INC=100000000
*DYNAMIC
1.E-5, 20

*BOUNDARY
Nfix1,1,3

*CLOAD, AMPLITUDE=AMP1
Nsurface, 1, 0.0
Nsurface, 2, 0.0
Nsurface, 3, 0.0


*NODE FILE
U
*EL FILE
S
*END STEP
